// COMSOL Multiphysics 6.0.0.318 model "Self-discharge measurement model.mph"
// Outline of the model tree

Parameters
  L_neg = 52[um]*1.07  // 负极单面料厚
  L_pos = 36[um]/96.894*157.76*1.1  // 正极单面料厚
  L_sep = 14[um]  // 膈膜厚度
  S = 273*97.5*30*2[mm^2]/38.7*1.8  // 正极片总面积(单面有效涂布面积*2）
  Meta_CMC = 0.011  // 负极增稠剂CMC占比
  Meta_DY1 = 0.014  // 负极粘结剂占比
  Meta_neg = 0.9667  // 负极主材占比
  Meta_pos = 0.9748  // 正极主材占比
  Meta_PVDF = 0.01  // 正极粘结剂占比
  Meta_SP_neg = 0.0083  // 负极导电剂占比
  Meta_SP_pos = 0.0152  // 正极导电剂占比
  PD_neg = 1.47[g/cm^3]  // 负极压实密度
  PD_pos = 2.2[g/cm^3]  // 正极压实密度
  CW_neg = 76.25[g/m^2]  // 负极单面面密度
  CW_pos = 121.25[g/m^2]  // 正极单面面密度
  rp_neg = 3.3723e-06[m]  // 负极颗粒半径(D50计)
  rp_pos = 8.75e-07[m]  // 正极颗粒半径(D51计)
  M_neg = 72[g/mol]  // 负极摩尔质量
  M_pos = 157.76[g/mol]  // 正极摩尔质量
  rho_CMC = 1[g/cm^3]  // 负极增稠剂CMC真密度
  rho_DY1 = 1[g/cm^3]  // 负极粘结剂真密度
  rho_neg = 2.24[g/cm^3]  // 负极主材真密度
  rho_pos = 3.6[g/cm^3]  // 正极主材真密度
  rho_PVDF = 1.78[g/cm^3]  // 正极粘结剂真密度
  rho_SP_neg = 2.26[g/cm^3]  // 负极导电剂真密度
  rho_SP_pos = 2.26[g/cm^3]  // 正极导电剂真密度
  csmax_neg = rho_neg/M_neg  // 负极最大锂浓度
  csmax_pos = rho_pos/M_pos  // 正极最大锂浓度
  cl = 1.2[mol/L]  // 电解液锂盐浓度
  epsl_neg = 1-PD_neg*(Meta_neg/rho_neg+Meta_SP_neg/rho_SP_neg+Meta_CMC/rho_CMC+Meta_DY1/rho_DY1)  // 负极孔隙率(计算)
  epsl_pos = 1-PD_pos*(Meta_pos/rho_pos+Meta_SP_pos/rho_SP_pos+Meta_PVDF/rho_PVDF)  // 正极孔隙率(计算)
  epsl_sep = 0.44  // 膈膜孔隙率
  epss_neg = 0.6242  // 理论计算负极体积分数
  epss_pos = 0.6931  // 理论计算正极体积分数
  Rfilm_neg = 0.6[mohm]  // 负极膜片电阻（1540mm2)
  Rfilm_pos = 181.74[mohm]  // 正极膜片电阻（1540mm2)
  sigmas_neg = 87.3643[S/m]  // 负极电子电导率
  sigmas_pos = 19.9422[S/m]  // 正极电子电导率
  A_Ds_neg = 1.8794e-12[m^2/s]  // 负极扩散系数前置因子
  A_Ds_pos = 1.1575e-12[m^2/s]  // 正极扩散系数前置因子
  A_i0_neg = 1.4321[A/m^2]  // 负极参考交换电流密度前置因子
  A_i0_pos = 18.5192[A/m^2]  // 正极参考交换电流密度前置因子
  Brugg_neg = 2.5130181314838675  // 负极布拉格系数
  Brugg_pos = 2.5570879456297892  // 正极布拉格系数
  Brugg_sep = 3.373800059213841  // 隔膜布拉格系数
  Ea_Ds_neg = 72804.7934[J/mol]  // 负极扩散系数活化能
  Ea_Ds_pos = 76475.8415[J/mol]  // 正极扩散系数活化能
  Ea_i0_neg = 99252.2884[J/mol]  // 负极参考交换电流密度活化能
  Ea_i0_pos = 89287.5107[J/mol]  // 正极参考交换电流密度活化能
  SOC = 0.6  // 电芯SOC
  SOC_neg_0_SOC = 0.07  // 负极初始SOC
  SOC_pos_0_SOC = 0.91  // 正极初始SOC
  SOL_neg = SOC_neg_0_SOC+SOC*Q_cell0/(S*L_neg*epss_neg*csmax_neg*F_const)  // 负极SOC
  SOL_pos = SOC_pos_0_SOC-SOC*Q_cell0/(S*L_pos*epss_pos*csmax_pos*F_const)  // 正极SOC
  cs0_neg = SOL_neg*csmax_neg  // 负极初始锂浓度
  cs0_pos = csmax_pos*SOL_pos  // 正极初始锂浓度
  I_1C = 35[A]/38.7*1.8  // 1C电流
  Q_cell0 = 38.288[Ah]/38.7*1.8  // 实测电芯0.04C容量
  T_ref = 25[degC]  // 参考温度
  C = 5
  Ea_i0_Li = 11482.2235[J/mol]
  A_i0_Li = 1.2614[A/m^2]
  T0 = 25[degC]  // 电芯温度
  Omega = 0.05
  Amp = 1
  NP = S*L_neg*epss_neg*csmax_neg*F_const/(S*L_pos*epss_pos*csmax_pos*F_const)
  R_SD = 1e9[ohm]
  R_out = 10[ohm]
  Vout = 3.33[V]

Functions
  int1: Interpolation "插值 1"
    funcname = Eeq_neg
    table = 
      {0.061378196, 1.4814}
      {0.062962314, 1.124421965}
      {0.064546432, 1.015850695}
      {0.066130551, 0.930452587}
      {0.067714669, 0.858320126}
      {0.069298788, 0.797845515}
      {0.070882906, 0.745470994}
      {0.072467025, 0.701993428}
      {0.074051143, 0.665928471}
      {0.075635262, 0.634573705}
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    extrap = linear
    fununit = V
    argunit = 1
  int2: Interpolation "插值 2"
    funcname = Eeq_pos
    table = 
      {0.01, 3.538446291}
      {0.02, 3.430533}
      {0.03, 3.424694609}
      {0.04, 3.424504348}
      {0.05, 3.424500072}
      {0.06, 3.424500001}
      {0.07, 3.4245}
      {0.08, 3.4245}
      {0.09, 3.4245}
      {0.1, 3.4245}
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    interp = piecewisecubic
    extrap = linear
    fununit = V
    argunit = 1
  step1: Step "阶跃 1" | location = 0.001; smooth = 0.001
  int3: Interpolation "插值 3" (disabled)
    table = 
      {0, 25.5}
      {1, 25.5}
      {2, 25.6}
      {3, 25.6}
      {4, 25.5}
      {5, 25.5}
      {6, 25.5}
      {7, 25.5}
      {8, 25.5}
      {9, 25.5}
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    interp = piecewisecubic
    extrap = linear
    fununit = degC
    argunit = s
  wv1: Wave "波形 1" | type = square; smooth = Omega*0.001; dutycycle = 0.8; period = 0.05[s]; baseline = 0.25; amplitude = 0.25
  pw1: Piecewise "分段 1" | smooth = contd1; zonelengthtype = absolute; smoothzone = 0.01; smoothends = on; pieces = {0, 3600, 1}; argunit = s; fununit = 1
  wv2: Wave "波形 2" | type = square; smooth = Omega*0.001; dutycycle = 0.8; period = Omega[s]; baseline = 0.15; amplitude = 0.7/2[1]

Variables
  var1 "变量 1"
    Ecell = intop1(phis)
    Epos = intop1(phis)-pos_sep(phil)
    Eneg = neg_cc(phis)-neg_sep(phil)
    Eeq_Li = R_const*T0/F_const*log(comp1.neg_sep(cl)/(1000[mol/(m^3)]))
    Ds_neg = A_Ds_neg*exp(-Ea_Ds_neg/R_const*(1/T0-1/T_ref))  // 负极固相扩散系数
    Ds_pos = A_Ds_pos*exp(-Ea_Ds_pos/R_const*(1/T0-1/T_ref))  // 正极固相扩散系数
    i0_neg = A_i0_neg*exp(-Ea_i0_neg/R_const*(1/T0-1/T_ref))  // 负极参考交换电流密度
    i0_pos = A_i0_pos*exp(-Ea_i0_pos/R_const*(1/T0-1/T_ref))  // 正极参考交换电流密度
    i0_Li = A_i0_Li*exp(-Ea_i0_Li/R_const*(1/T0-1/T_ref))  // 析锂反应交换电流密度
    n_Li = liion.c_pce1_Li_metal  // 沉积锂金属浓度
    i0_Li_p = i0_Li*(cl/(1000[mol/m^3]))^0.5
    rev_coe = 1000*n_Li/(1+1000*n_Li)  // 不可逆系数

Couplings
  intop1: Integration "积分 1" on boundaries 5
  intop2: Integration "积分 2" on boundaries 4 | opname = pos_sep
  intop3: Integration "积分 3" on boundaries 2 | opname = neg_sep
  intop4: Integration "积分 4" on boundaries 1 | opname = neg_cc

Probes
  AmMeter_cir_am1: GlobalVariable "流过安培计 am1 的电流"
    probename = i_am1
    expr = comp1.cir.am1.i
    unit = A
    descr = 流过安培计 # 的电流
    table = tbl1
  point1: Point "点探针 1" on boundaries 5 | probename = Et; expr = phis; unit = V; descr = 电势; frame = spatial; table = tbl1

Geometry
  geom1 "几何 1" (1D, length unit m)
    i1: Interval "线段间隔 1" | specify = len; len = {L_neg, L_sep/2, L_sep/2, L_pos}
    fin: Finalize "形成联合体"

Materials
  mat1: Common "Graphite Electrode, LixC6 MCMB (Negative, Li-ion Battery)" (disabled) on domains 1
    def "Basic"
      electricconductivity = 100[S/m]
      diffusion = 1.4523e-13*exp(68025.7/8.314*(1/(T_ref/1[K])-1/(T2/1[K])))[m^2/s]
      thermalconductivity = 1[W/(m*K)]
      heatcapacity = 750[J/(kg*K)]
      density = 2300[kg/m^3]
      T_ref = 318[K]
      T2 = min(393.15,max(T,223.15))
    ElectrodePotential "Equilibrium potential"
      Eeq = Eeq_int1(soc)+dEeqdT_int1(soc)*(T-298[K])
      dEeqdT = dEeqdT_int1(soc)
      cEeqref = 31507[mol/m^3]
      soc = c/cEeqref
      int1: Interpolation
        funcname = Eeq_int1
        table = 
          {0, 2.781186612}
          {0.01, 1.520893224}
          {0.02, 0.893922607}
          {0.03, 0.581284406}
          {0.04, 0.42452844}
          {0.05, 0.344895805}
          {0.06, 0.303146342}
          {0.07, 0.279578072}
          {0.08, 0.264093089}
          {0.09, 0.251347845}
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        interp = piecewisecubic
        extrap = linear
        fununit = V
      int2: Interpolation | funcname = dEeqdT_int1; table = {{0, 3.0e-4}, {0.17, 0}, {0.24, -6e-5}, {0.28, -1.6e-4}, {0.5, -1.6e-4}, {0.54, -9e-5}, {0.71, -9e-5}, {0.85, -1.0e-4}, {1.0, -1.2e-4}}; fununit = V/K
    OperationalSOC "Operational electrode state-of-charge"
      socmax = 0.98
      socmin = 0
  mat2: Common "NMC 811 Electrode, LiNi0.8Mn0.1Co0.1O2 (Positive, Li-ion Battery)" on domains 4
    def "Basic"
      electricconductivity = 0.17[S/m]
      diffusion = 5e-13*exp(1200*(1/(T_ref/1[K])-1/(T2/1[K])))[m^2/s]
      thermalconductivity = 1.58[W/(m*K)]
      heatcapacity = 840.1[J/(kg*K)]
      density = 4.87[g/cm^3]
      T_ref = 298[K]
      T2 = min(393.15,max(T,223.15))
    ElectrodePotential "Equilibrium potential"
      Eeq = Eeq_int1(soc)+dEeqdT_int1(soc)*(T-298[K])
      dEeqdT = dEeqdT_int1(soc)
      cEeqref = 50060[mol/m^3]
      soc = c/cEeqref
      int1: Interpolation
        funcname = Eeq_int1
        table = 
          {0.222893034308, 4.25681795484}
          {0.23718770939, 4.22123858032}
          {0.250374270125, 4.19821621502}
          {0.263560830861, 4.18435458147}
          {0.276747391596, 4.17555545756}
          {0.289933952331, 4.16928758847}
          {0.303120513066, 4.16350186316}
          {0.316307073801, 4.15663131436}
          {0.329493634536, 4.14530093562}
          {0.342680195271, 4.13083662235}
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        interp = piecewisecubic
        extrap = linear
        fununit = V
      int2: Interpolation
        funcname = dEeqdT_int1
        table = 
          {0.220410330185, 0.0140149553747}
          {0.238805741263, 0.0179719518372}
          {0.254614297659, 0.0248880063396}
          {0.271620471964, 0.0340549051944}
          {0.282638556724, 0.0364049224694}
          {0.302039966846, 0.0269937595203}
          {0.314255669516, 0.0204315011919}
          {0.333657079638, 0.01172733584}
          {0.355214201996, 0.0148088719319}
          {0.36814847541, 0.0179144419478}
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        interp = piecewisecubic
        fununit = mV/K
    OperationalSOC "Operational electrode state-of-charge"
      socmax = 0.942
      socmin = 0.222
  mat3: Common "LiPF6 in 3:7 EC:EMC (Liquid electrolyte, Li-ion Battery)" on domains 2, 3
    def "Basic"
      diffusion = DL_int1(c/1[mol/m^3])*exp(16500/8.314*(1/(T_ref/1[K])-1/(T2/1[K])))
      T_ref = 298[K]
      T2 = min(393.15,max(T,223.15))
      int1: Interpolation
        funcname = DL_int1
        table = 
          {200, 3.9e-10/(1-200*59e-6)}
          {500, 4.12e-10/(1-500*59e-6)}
          {800, 4e-10/(1-800*59e-6)}
          {1000, 3.8e-10/(1-1000*59e-6)}
          {1200, 3.50e-10/(1-1200*59e-6)}
          {1600, 2.68e-10/(1-1600*59e-6)}
          {2000, 1.9e-10/(1-2000*59e-6)}
        interp = piecewisecubic
        fununit = m^2/s
    ElectrolyteConductivity
      sigmal = sigmal_int1(c/1[mol/m^3])*exp(4000/8.314*(1/(T_ref2/1[K])-1/(T3/1[K])))
      T_ref2 = 298[K]
      T3 = min(393.15,max(T,223.15))
      int1: Interpolation | funcname = sigmal_int1; table = {{0, 1e-6}, {200, 0.455}, {500, 0.783}, {800, 0.935}, {1000, 0.95}, {1200, 0.927}, {1600, 0.78}, {2000, 0.60}, {2200, 0.515}}; interp = piecewisecubic; fununit = S/m
    SpeciesProperties
      transpNum = transpNm_int1(c/1[mol/m^3])
      fcl = actdep_int1(c/1[mol/m^3])*exp(-1000/8.314*(1/(T_ref3/1[K])-1/(T4/1[K])))
      T4 = min(393.15,max(T,223.15))
      T_ref3 = 298[K]
      int1: Interpolation | funcname = transpNm_int1; table = {{200, 0.37}, {500, 0.322}, {800, 0.27}, {1000, 0.251}, {1200, 0.248}, {1600, 0.236}, {2000, 0.11}}; interp = piecewisecubic
      int2: Interpolation | funcname = actdep_int1; table = {{200, 0}, {500, 0.29}, {800, 0.695}, {1000, 1}, {1200, 1.32}, {1600, 2.07}, {2000, 2.50}}; interp = piecewisecubic
    ElectrolyteSaltConcentration
      cElsalt = 1200[mol/m^3]
  mat4: Common "LFP, LiFePO4 (Positive, Li-ion Battery)" on domains 4
    def "Basic"
      poissonsratio = 0.3
      youngsmodulus = 117.8[GPa]
      diffusion = 3.2e-13[m^2/s]
      electricconductivity = 91[S/m]
      thermalconductivity = 1[W/(m*K)]
      heatcapacity = 881[J/(kg*K)]
      density = 3600[kg/m^3]
    ElectrodePotential "Equilibrium potential"
      Eeq = Eeq_int1(soc)+dEeqdT_int1(soc)*(T-298[K])
      dEeqdT = dEeqdT_int1(soc)
      cEeqref = 21190[mol/m^3]
      soc = c/cEeqref
      int1: Interpolation
        funcname = Eeq_int1
        table = 
          {0.01, 3.538446291}
          {0.02, 3.430533}
          {0.03, 3.424694609}
          {0.04, 3.424504348}
          {0.05, 3.424500072}
          {0.06, 3.424500001}
          {0.07, 3.4245}
          {0.08, 3.4245}
          {0.09, 3.4245}
          {0.1, 3.4245}
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        interp = piecewisecubic
        extrap = linear
        fununit = V
      int2: Interpolation
        funcname = dEeqdT_int1
        table = 
          {0.01, 8.62369E-06}
          {0.02, 2.8778E-05}
          {0.03, 4.26811E-05}
          {0.04, 5.15442E-05}
          {0.05, 5.64049E-05}
          {0.06, 5.81456E-05}
          {0.07, 5.75106E-05}
          {0.08, 5.51215E-05}
          {0.09, 5.14917E-05}
          {0.1, 4.704E-05}
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        fununit = V/K
    OperationalSOC "Operational electrode state-of-charge"
      socmax = 0.90
      socmin = 0.01
    ic "Intercalation strain"
      dvol = 11.62[cm^3/mol]*(c-elpot.cEeqref)

Physics
  liion: LithiumIonBatteryMPH "锂离子电池" on all domains
    dependent variable phil
    Ac.Ac = S
    ice1: Electrolyte "电解质 1" (default) | minput_temperature = T0
    nf1: NoFlux "无通量 1" (default)
    ins1: Insulation "绝缘 1" (default)
    init1: init "初始值 1" (default)
    pce1: PorousElectrode "多孔电极 1" on domains 1
      ElectrolyteMaterial = mat3
      sigma_mat = userdef
      sigma = sigmas_neg
      epsl = epsl_neg
      taul = 1.2
      epss = epss_neg
      taus = 1.5
      IonicCorrModel = userdef
      fl = epsl_neg^Brugg_neg
      ElectricCorrModel = NoCorr
      DiffusionCorrModel = userdef
      fDl = epsl_neg^Brugg_neg
      AddVolumeChangeToElectrodeVolumeFraction = 0
      Species = Li_metal
      Ms = 0.00694
      rhos = 543
      FilmResistanceType = ThicknessAndConductivity
      dsf_src = root.comp1.liion.sbtot_pce1
      sigmaf = 1/(92.8e-9)[ohm*m]
      minput_temperature = T0
      pin1: ParticleIntercalation "颗粒插层 1" (default)
        csinit = cs0_neg
        Ds_mat = userdef
        Ds = Ds_neg
        cEeqref_mat = userdef
        cEeqref = csmax_neg
        socmin_mat = userdef
        socmin = 0
        socmax_mat = userdef
        socmax = 1
        rp = rp_neg
        minput_temperature = T0
      per1: PorousElectrodeReaction "多孔电极反应 1" (default)
        Eeq_mat = userdef
        Eeq = Eeq_neg(liion.cs_surface/csmax_neg)
        i0_ref = i0_neg
        minput_temperature = T0
        Viad = 0
      per2: PorousElectrodeReaction "多孔电极反应 2" on all domains
        Eeq_mat = userdef
        Eeq = 0
        ElectrodeKinetics = ButlerVolmer
        i0_ref = 100[A/m^2]
        i0 = i0_Li_p*step1(-liion.Ect[1/V])+rev_coe*i0_Li_p*step1(liion.Ect[1/V])*step1(n_Li[1/(mol/m^3)])
        alphaa = 0.3
        alphac = 0.7
        VLiTheta = 0
        Vib = 1
        minput_temperature = T0
    pce2: PorousElectrode "多孔电极 2" on domains 4
      ElectrolyteMaterial = mat3
      sigma_mat = userdef
      sigma = sigmas_pos
      epsl = epsl_neg
      epss = epss_pos
      IonicCorrModel = userdef
      fl = epsl_neg^Brugg_neg
      ElectricCorrModel = NoCorr
      DiffusionCorrModel = userdef
      fDl = epsl_neg^Brugg_neg
      minput_temperature = T0
      pin1: ParticleIntercalation "颗粒插层 1" (default)
        csinit = cs0_pos
        Ds_mat = userdef
        Ds = Ds_pos
        cEeqref_mat = userdef
        cEeqref = csmax_pos
        socmin_mat = userdef
        socmin = 0
        socmax_mat = userdef
        socmax = 1
        rp = rp_pos
        minput_temperature = T0
      per1: PorousElectrodeReaction "多孔电极反应 1" (default)
        Eeq_mat = userdef
        Eeq = Eeq_pos(liion.cs_surface/csmax_pos)
        i0_ref = i0_pos
        minput_temperature = T0
        Viad = 0
    sep1: Separator "隔膜 1" on domains 2, 3
      epsl = epsl_sep
      IonicCorrModel = userdef
      fl = epsl_sep^Brugg_sep
      DiffusionCorrModel = userdef
      fDl = epsl_sep^Brugg_sep
      minput_temperature = T0
    egnd1: ElectricGround "电接地 1" on boundaries 1
    ec1: ElectrodeCurrent "电极电流 1" (disabled) on boundaries 5 | Its = I_1C*wv1(t)
    ec2: ElectrodeCurrent "电极电流 2" (disabled) on boundaries 5 | Its = I_1C*0.05
    cit1: CircuitTerminal "电路终端 1" on boundaries 5
  cir: Circuit "电路"
    dependent variable voltages
    gnd1: GroundNode "接地节点 1"
    V1: VoltageSource "电压源 1" | Connections = {1, 0}; value = Vout
    am1: AmMeter "安培计 1" | Connections = {1, 2}
    R2: Resistor "R_out" | R = R_out; Connections = {2, 3}
    R1: Resistor "R_SD" | R = R_SD; Connections = {3, 0}
    IvsU1: ModelDeviceIV "外部 I vs. U 1" | V_src = root.comp1.liion.cit1.VCircuit; Connections = {3, 0}

Mesh
  mesh1 "网格 1" (physics-controlled)

Studies
  std1 "研究 1"
    param: Parametric "参数化扫描"
      pname = {R_SD, R_out, Vout}
      plistarr = {1e3 1e3 1e3 1e4 1e5 1e6, 0.1 1 10 1 1 1, 3.33057 3.3305 3.3305 3.3305 3.3305 3.3305}
      punit = {Ω, Ω, V}
    cdi: CurrentDistributionInitialization "电流分布初始化"
    time: Transient "瞬态" | tunit = h; tlist = range(0,0.1,48)

Solver configurations
  sol1 "解 1" (study std1)
    v1: Variables "因变量 1"
      comp1_cl: Field "电解质盐浓度 (comp1.cl)" | scalemethod = manual; scaleval = 1000
      comp1_phil: Field "电解质电位 (comp1.phil)" | scalemethod = manual; scaleval = 1
      comp1_phis: Field "电势 (comp1.phis)" | scalemethod = manual; scaleval = 1
    s1: Stationary "稳态求解器 1" | stol = 1.0E-4
      fc1: FullyCoupled "全耦合 1" | linsolver = d1; minstep = 1.0E-6; maxiter = 50
      d1: Direct "直接 (liion)" | linsolver = pardiso
    su1: StoreSolution "解存储 1"
    v2: Variables "因变量 2" | initmethod = sol; resscalemethod = manual; notsolmethod = sol
      comp1_cl: Field "电解质盐浓度 (comp1.cl)" | scalemethod = manual; scaleval = 1000
      comp1_liion_pce1_cs: Field "固相浓度 (comp1.liion.pce1.cs)" | scalemethod = manual; scaleval = 10000
      comp1_liion_pce2_cs: Field "固相浓度 (comp1.liion.pce2.cs)" | scalemethod = manual; scaleval = 10000
      comp1_phil: Field "电解质电位 (comp1.phil)" | scalemethod = manual; scaleval = 1
      comp1_phis: Field "电势 (comp1.phis)" | scalemethod = manual; scaleval = 1
    t1: Time "瞬态求解器 1" | tunit = h; tlist = range(0,0.1,48); tout = tsteps; rtol = 0.001; maxorder = 2; eventout = on
      fc1: FullyCoupled "全耦合 1" | linsolver = d1; dtech = auto
      d1: Direct "直接 1"
  sol2 "解存储 1" (study std1)
  sol3 "参数化解 1" (study std1)

Datasets
  dset1: Solution | solution = sol1
  dset2: Solution | solution = sol2
  dset3: Solution "探针解 3" | solution = sol1
  dset4: Solution | solution = sol3
  avh1: Average "点探针 1" on boundaries 5 | data = dset3

Derived values
  gev1: EvalGlobal "流过安培计 am1 的电流" | data = dset3; table = tbl1; expr = comp1.cir.am1.i
  pev1: EvalPoint "点探针 1" | data = avh1; table = tbl1; expr = phis

Tables
  tbl1: Table "探针表 1"
    时间 (h) | 流过安培计 # 的电流 (A) | 电势 (V), 点探针 1
    0 | -5.44074e-06 | 3.33051
    0.000474304 | -5.42841e-06 | 3.33051
    0.000948608 | -5.4194e-06 | 3.33051
    0.00189722 | -5.40493e-06 | 3.33051
    0.00379443 | -5.38777e-06 | 3.33051
    0.00569165 | -5.37438e-06 | 3.33051
    0.00948608 | -5.35585e-06 | 3.33051
    0.0132805 | -5.34194e-06 | 3.33051
    0.0208694 | -5.3215e-06 | 3.33051
    0.0284582 | -5.30413e-06 | 3.33051
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  tbl2: Table "表格 2"
    // 流过安培计 am1 的电流
    R_SD (Ω) | R_out (Ω) | Vout (V) | Time (h) | 流过安培计 # 的电流 (A)
    1000 | 0.1 | 3.33057 | 0 | 0.00103153
    1000 | 0.1 | 3.33057 | 0.1 | 0.00156064
    1000 | 0.1 | 3.33057 | 0.2 | 0.00183741
    1000 | 0.1 | 3.33057 | 0.3 | 0.00207045
    1000 | 0.1 | 3.33057 | 0.4 | 0.00226685
    1000 | 0.1 | 3.33057 | 0.5 | 0.00243266
    1000 | 0.1 | 3.33057 | 0.6 | 0.00257266
    1000 | 0.1 | 3.33057 | 0.7 | 0.0026909
    1000 | 0.1 | 3.33057 | 0.8 | 0.00279075
    1000 | 0.1 | 3.33057 | 0.9 | 0.00287504
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
Plots
  pg1: PlotGroup1D "一维绘图组 1" | data = dset4; ylabel = 流过安培计的电流 (uA)
    glob1: Global "全局 1" (disabled) | expr = liion.cit1.ICircuit; unit = A; descr = 终端电流
    glob2: Global "全局 2" | expr = cir.am1.i; unit = uA; descr = 自放电电流
    glob3: Global "全局 3" (disabled) | expr = cir.R1_i; unit = A; descr = 通过器件“R1”的电流
  pg3: PlotGroup1D "一维绘图组 3" | data = dset4
    glob1: Global "全局 1" | expr = Ecell; unit = V
  pg4: PlotGroup1D "探针绘图组 4"
    tblp1: Table "探针表图 1" | table = tbl1
  pg5: PlotGroup1D "探针绘图组 5" | data = none
    tblp1: Table "探针表图 1" | table = tbl1; plotcolumninput = manual